# ---------- Initialize Simulation ---------------------
clear
units metal
dimension 3
boundary p p p
atom_style atomic
#atom_modify map array

#---------------SIMULATION CELL-----------
region whole block -10 10 -10 10 -10 10 units box
create_box 8 whole

# ---------- ATOM DEFINITIONS ---------------------
region box block -10 10 -10 10 -10 10 units box
lattice bcc 3.08 orient x 1 0 0 orient y 0 1 0 orient z 0 0 1
create_atoms 1 region box  # Start with type 1 atoms


set type 1 type/fraction 1 1.0 12345 # Al (100%)
set type 1 type/fraction 2 0.8667 12345 # V (8.333% of remaining 91.667%)
set type 2 type/fraction 3 0.80003 12345 # Cr (16.667% of remaining 83.333%)
set type 3 type/fraction 4 0.53336 12345 # Fe (8.333% of remaining 66.667%)
set type 4 type/fraction 5 0.3336 12345 # Co (25.000% of remaining 58.333%)
set type 5 type/fraction 6 0.20006 12345 # Ni (16.667% of remaining 33.333%)
set type 6 type/fraction 7 0.13339 12345 # Cu (8.333% of remaining 16.667%)
set type 7 type/fraction 8 0.06667 12345 # Mo (8.333% of remaining 16.667%)


# ---------- Define Interatomic Potential ---------------------
pair_style lj/cut 10
pair_coeff 1 1 0.4 3.6
pair_coeff 2 2 0.63 3.8
pair_coeff 3 3 0.15 2.6
pair_coeff 4 4 0.1 2.5
pair_coeff 5 5 0.18 2.7
pair_coeff 6 6 0.2 2.8
pair_coeff 7 7 0.41 2.55
pair_coeff 8 8 0.8 3.8

# ---------MASSES ------------
mass 1 26.9815
mass 2 50.9415
mass 3 51.996
mass 4 55.845
mass 5 58.933
mass 6 58.693
mass 7 63.546
mass 8 95.95

# ---------- Define Settings ---------------------
compute eng all pe/atom
compute eatoms all reduce sum c_eng

# ---------- Run Energy Minimization ---------------------
reset_timestep 0
fix 1 all box/relax iso 0.0 vmax 0.001
thermo 10
thermo_style custom step pe lx ly lz press pxx pyy pzz c_eatoms

min_style cg
minimize 1e-25 1e-25 5000 10000

# ---------- Prepare for MSAD Calculation ---------------------
unfix 1  # Remove minimization fix
velocity all create 298.0 1234567 mom yes rot yes dist gaussian  # Assign initial velocities
fix nvt all nvt temp 298.0 298.0 100.0  # Apply NVT thermostat to maintain 300K

# Run short equilibration
run 100000

# ---------- Compute MSAD ---------------------
compute msad all msd  # Track mean squared atomic displacement
fix msad_output all ave/time 100 1 100 c_msad file msd_output.txt mode vector  # Store MSAD data

# ---------- Run Simulation for MSAD Tracking ---------------------
run 100 # Run for 50,000 timesteps to track atomic displacements

# ---------- Export Final Data ---------------------
write_data structure_msad.lmpdat nocoeff  # Save relaxed structure
